# Task 1
x := 2
n := 3
y := (sqrt(x^3 + n) + cos(|n*x - 1|)^2)/nthroot(x^5 + 8*x + n, 4)
y = 1.2712
# Task 2
x := 7
y := 10
z := -3
p := if(x > y, sin(x) + 3*|y| - z^2, (y + 3)*ln(|x + 1|)/sqrt(z^2 + 1))
p = 8.5485
q := if((x > y) and x < 1, cos(x) + 2*|y + 1|, (x*y + 3)/sqrt(y^2 + 5))
q = 7.12407
w := if((x < y) or (y ≥ 10), x^2 + 2*(y*x + 1) - z, (x^-3*y^2 + 3)*sqrt(z^2 + 7))
w = 194
# Task 3
x := -2, -1.6 .. 2
n := 2
f(x) := (x^2 - n*x + sin(x)*sqrt(|x - cos(n*x)|))
f(x) = [6.94492; 4.98463; 3.20607; 1.6102; 0.552186; 0; -0.427881; -0.306773; 0.337308; 0.971235; 1.48125]
# Task 4
n := 2
A := runif(3, -3*n, n)
A = [-5.98985; -4.45342; -1.31995]
B := runif(3, -3*n, 3*n)
B = [-1.7963; 3.87405; -3.91045]
C := runif(3, -3*n, 3*n)
C = [2.52594; -2.35217; -4.90306]
s := A*B
s = -1.33157
V := B×C
V = [-28.1928; -18.685; -5.56044]
w := (A×B)*C
w = 259.422
|A| = 7.57981
|B| = 5.79022
|C| = 5.99609
# Task 5
x := -3*π .. 3*π
y(x) := e^(-(|x|/3))*cos(x)
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# Task 6
x := -9, -8.75 .. 9
f(x) := if(x < 0, e^x*x^3, e^(-x)*x^3)
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# Task 8
q(x) := e^(-x^2)
p(x) := d/dx(q(x))
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# Task 9
h(x, y) := sin(sqrt(x^2 + y^2))/sqrt(x^2 + y^2)
# [component: inputs h]
# Task 10
f(x) := x^2 + (x - 2)*sin(x) - 5
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x := 4
x1 := root(f(x), x)
x1 = 2.19967
x := -4
x2 := root(f(x), x)
x2 = -1.32936
# Task 11
f(x) := x^2 + x*sin(2*x) - (x - 5)*cos(x)
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x1 := root(f(x), x, -2, 0)
x1 = -1.93283
x2 := root(f(x), x, -3, -2.5)
x2 = -2.97354
# Task 12
n := 3
f(x) := x^3 + (4 - n)*x^2 + (3 - 4*n)*x - 3*n
V := [-3*n, 3 - 4*n, 4 - n, 1]
V := [-3*n; 3 - 4*n; 4 - n; 1]
X := polyroots(V)
X = [-3; -1; 3]
# Task 13
n := 2
A := [n, n + 1, n + 2; n - 3, n - 2, n; n - 1, n, n + 1]
B := [6*n + 8; 6*n - 7; 6*n + 2]
[x; y; z] := A^-1*B
X := [x; y; z]
X = [1; 2; 3]
x = 1
y = 2
z = 3
# Task 14
n := 2
x := 0 .. n + sqrt(n) + 2
y2(x) := (x - n)/2
y1(x) := (x - n)^2 - n
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x := 1
y := 2
Given
(x - n)^2 - y - n = -3
x - 2*y - n = -5
V := Find(x, y)
V = [1; 2]
x := 3
y := 2
Given
(x - n)^2 - y - n = -3
x - 2*y - n = -3
V := Find(x, y)
V = [3; 2]
# Task 15
f(x) := x*sin(x)
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Максимумы
x := -1
x1_max := Maximize(f, x)
x1_max = -2.02876
y1_max := f(x1_max)
y1_max = 1.81971
x := -2
x2_max := Maximize(f, x)
x2_max = -2.02876
y2_max := f(x2_max)
y2_max = 1.81971
x := 2
x3_max := Maximize(f, x)
x3_max = 2.02876
y3_max := f(x3_max)
y3_max = 1.81971
x := 8
x4_max := Maximize(f, x)
x4_max = 7.97867
y4_max := f(x4_max)
y4_max = 7.91673
Минимумы
x := -5
x1_min := Minimize(f, x)
x1_min = -4.91318
y1_min := f(x1_min)
y1_min = -4.81447
x := 0
x2_min := Minimize(f, x)
x2_min = 0
y2_min := f(x2_min)
y2_min = 0
x := 5
x3_min := Minimize(f, x)
x3_min = 4.91318
y3_min := f(x3_min)
y3_min = -4.81447
# Task 7
Δx := π/4
i := 1 .. 16
x1 := -2*π
j := 1 .. 16
x[i] := x1 + i*Δx
g(x) := sqrt(|x|)*sin(x)
x = [0; -5.49779; -4.71239; -3.92699; -3.14159; -2.35619; -1.5708; -0.785398; 0; 0.785398; 1.5708; 2.35619; 3.14159; 3.92699; 4.71239; 5.49779; 6.28319]
