Δx := π/4
i := 1 .. 16
x1 := -2*π
j := 1 .. 16
x[i] := x1 + i*Δx
g(x) := sqrt(|x|)*sin(x)
3
x = [0; -5.49779; -4.71239; -3.92699; -3.14159; -2.35619; -1.5708; -0.785398; 0; 0.785398; 1.5708; 2.35619; 3.14159; 3.92699; 4.71239; 5.49779; 6.28319]  # X
