# Задаем координаты вершин пирамиды и положения камеры:
PIR := [0, 0, 3, 0, 0, 1; 3, 0, 0, 1, 0, 0; 0, 0, 0, 3, 3, 3; 1, 1, 1, 1, 1, 1]
PV := [10; 315; 45]
# Получаем сферические координаты точки наблюдения:
r_v := PV[0]*π/180 = 0.174533
ϕ_v := PV[1]*π/180 = 5.49779
θ_v := PV[2]*π/180 = 0.785398
# Задаем положение секущей плоскости в МСК XYZ
# -угол между осью z и вектором нормали к секущей плоскости
ϕ_grad := 50
ϕ := ϕ_grad/180*π = 0.872665
# - вектор нормали к секущей плоскости
N := transpose([0, sin(ϕ), cos(ϕ)]) = [0; 0.766044; 0.642788]
# - координаты точки пересечения оси Z и секущей плоскости
x_0 := 0
y_0 := 0
z_0 := 3/4*PIR[:, 3][2] = 2.25
# Задаем параметры уравнения секущей плоскости
[A; B; C] := N = [0; 0.766044; 0.642788]
D := -(A*x_0 + B*y_0 + C*z_0)
# Находим точку пересечения P1 секущей плоскости с ребром CD
[x1; y1; z1] := submatrix(PIR, 0, 2, 0, 0) = [0; 3; 0]
[x2; y2; z2] := submatrix(PIR, 0, 2, 3, 3) = [0; 1; 3]
Δx := x2 - x1
Δy := y2 - y1
Δz := z2 - z1
# - параметр, при котором ребро и плоскость имеют общую точку. Если между 0 и 1, то ребро пересекает плоскость
t_AD1 := -((A*x1 + B*y1 + C*z1 + D)/(A*Δx + B*Δy + C*Δz))
t_AD := 0.3
x_AD := x1 + Δx*t_AD
y_AD := y1 + Δy*t_AD
z_AD := z1 + Δz*t_AD
x_AD = 0
y_AD = 2.4
z_AD = 0.9  # - координаты точки пересечения Р1
# Находим точку пересечения P2 секущей плоскости с ребром CF
V1 := submatrix(PIR, 0, 2, 2, 2) = [3; 0; 0]
V2 := submatrix(PIR, 0, 2, 5, 5) = [1; 0; 3]
ΔV := V2 - V1
t_CF := -((N*V1 + D)/(N*ΔV))
V_CF := V1 + ΔV*t_CF
x_CF := V_CF[0]
y_CF := V_CF[1]
z_CF := V_CF[2]  # - координаты точки пересечения Р2
# Находим точку пересечения P3 секущей плоскости с ребром AE
V1 := submatrix(PIR, 0, 2, 1, 1) = [0; 0; 0]
V2 := submatrix(PIR, 0, 2, 4, 4) = [0; 0; 3]
ΔV := V2 - V1
t_BE := -((N*V1 + D)/(N*ΔV))
V_BE := V1 + ΔV*t_BE
x_BE := V_BE[0]
y_BE := V_BE[1]
z_BE := V_BE[2]  # - координаты точки пересечения Р3
# Получаем матрицу мировых коорднат точек P1, P2, P3
TR := [x_AD, x_CF, x_BE; y_AD, y_CF, y_BE; z_AD, z_CF, z_BE; 1, 1, 1]
# Задаем область отображения графика в окне Windows
x_LW := 200
y_LW := 100  # – левый верхний угол области отображения
x_HW := 700
y_HW := 500  # – правый нижний угол области отображения
# Формируем матрицу пересчета мировых координат в видовые
K_view := [
    -sin(ϕ_v), cos(ϕ_v), 0, 0;
    -cos(θ_v)*cos(ϕ_v), -cos(θ_v)*sin(ϕ_v), sin(θ_v), 0;
    -sin(θ_v)*cos(ϕ_v), -sin(θ_v)*sin(ϕ_v), -cos(θ_v), r_v;
    0, 0, 0, 1
]
# Вычисляем координаты вершин пирамиды в видовой системе координат (ВСК)
PIR_V := K_view*PIR
# Вычисляем координаты вершин треугольника сечения Р1,
# Р2, Р3 в видовой системе координат (ВСК)
TR_V := K_view*TR
# Определяем координаты проекции вершин пирамиды на картинную плоскость
φvg := 310
φv := φvg*π/180 = 5.41052
θvg := 45
θv := θvg*π/180 = 0.785398
P_XY := stack(transpose(transpose(PIR_V)[:, 0]), transpose(transpose(PIR_V)[:, 1]), transpose(transpose(PIR_V)[:, 3]))
# Определяем координаты проекции вершин треугольника сечения Р1,
# Р2, Р3 на картинную плоскость
P_XY = [
    2.12132, 0, 2.12132, 0.707107, 0, 0.707107;
    1.5, 0, -1.5, 2.62132, 2.12132, 1.62132;
    1, 1, 1, 1, 1, 1
]
TR_XY := stack(transpose(transpose(TR_V)[:, 0]), transpose(transpose(TR_V)[:, 1]), transpose(transpose(TR_V)[:, 3]))
# Определяем габаритную область проекции пирамиды на плоскость XY ВСК – картинную плоскость
x_L := min(transpose(P_XY)[:, 0])
y_H := max(transpose(P_XY)[:, 1])
# – левый верхний угол
x_L = 0
y_H = 2.62132
x_H := max(transpose(P_XY)[:, 0])
y_L := min(transpose(P_XY)[:, 1])
# – правый нижний угол
x_H = 2.12132
y_L = -1.5
# Вычисляем параметры, необходимые для формирования матрицы пересчета координат из плоскости XY ВСК в ОК
Δx_W := x_HW - x_LW
Δx_W = 500
Δx := x_H - x_L
Δx = 2.12132
Δy_W := y_HW - y_LW
Δy_W = 400
Δy := y_H - y_L
Δy = 4.12132
k_x := Δx_W/Δx
k_x = 235.702
k_y := Δy_W/Δy
k_y = 97.0563
T_SW := [k_x, 0, x_LW - k_x*x_L; 0, -k_y, y_HW + k_y*y_L; 0, 0, 1] = [235.702, 0, 200; 0, -97.0563, 354.416; 0, 0, 1]  # – матрица пересчета из ВСК в ОК
A := transpose([6, 0, 0, 1])
A1 := transpose([3, 0, 6, 1])
B1 := transpose([0, 0, 6, 1])
B := transpose([0, 0, 0, 1])
# Вычисляем оконные координаты вершин пирамиды
C := transpose([0, 6, 0, 1])
C1 := transpose([0, 3, 6, 1])
M_W := T_SW*P_XY
[x_a, x_b, x_c, x_d, x_e, x_f; y_a, y_b, y_c, y_d, y_e, y_f; q, q, q, q, q, q] := vectorize(round(M_W)) = [700, 200, 700, 367, 200, 367; 209, 354, 500, 100, 149, 197; 1, 1, 1, 1, 1, 1]
# Формируем массивы координат X и Y для рисования пирамиды
X := transpose([x_a, x_b, x_c, x_a, x_d, x_e, x_b, x_e, x_f, x_c, x_f, x_d]) = [700; 200; 700; 700; 367; 200; 200; 200; 367; 700; 367; 367]
Y := transpose([y_a, y_b, y_c, y_a, y_d, y_e, y_b, y_e, y_f, y_c, y_f, y_d]) = [209; 354; 500; 209; 100; 149; 354; 149; 197; 500; 197; 100]
# Вычисляем оконные координаты вершин
# треугольника сечения Р1, Р2, Р3
TR_W := T_SW*TR_XY
[x_p1, x_p2, x_p3; y_p1, y_p2, y_p3; q, q, q] := vectorize(round(TR_W)) = [600, 450, 200; 176, 273, 200; 1, 1, 1]
# Формируем массивы координат Х и У для рисования
# сечения пирамиды
rv := r_v
r_v = 0.174533
rv = 0.174533
EDx := transpose([x_p1, x_p2]) = [600; 450]
DFx := transpose([x_p2, x_p3]) = [450; 200]
FEx := transpose([x_p3, x_p1]) = [200; 600]
EAx := transpose([x_p1, x_a]) = [600; 700]
DCx := transpose([x_p2, x_c]) = [450; 700]
FBx := transpose([x_p3, x_b]) = [200; 200]
EDy := transpose([y_p1, y_p2]) = [176; 273]
DFy := transpose([y_p2, y_p3]) = [273; 200]
EAy := transpose([y_p1, y_a]) = [176; 209]
DCy := transpose([y_p2, y_c]) = [273; 500]
FEy := transpose([y_p3, y_p1]) = [200; 176]
FBy := transpose([y_p3, y_b]) = [200; 354]
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# Вычисление декартовых координат камеры
RC := [rv*sin(θv)*cos(φv); rv*sin(θv)*sin(φv); rv*cos(θv)] = [0.0793286; -0.0945402; 0.123413]
# Вычисление векторов нормали для каждой
AC := [A[0]; A[1]; A[2]] - [A1[0]; A1[1]; A1[2]] = [3; 0; -6]
A1C1 := [C[0]; C[1]; C[2]] - [A[0]; A[1]; A[2]] = [-6; 6; 0]
NAA1C := AC×A1C1 = [36; 36; 18]
NABB1 := transpose([0, -1, 0])
NB1BC := transpose([-1, 0, 0])
NABC := transpose([0, 0, -1])
NA1B1C1 := -NABC
# Определение видимости граней
# видимость ABC | видимость A1B1C1 | видимость ABB1
q1 := RC*NABC = -0.123413
q2 := RC*NA1B1C1 = 0.123413
q3 := RC*NABB1 = 0.0945402
# видимость B1BC | видимость NAA1C
q4 := RC*NB1BC = -0.0793286
q5 := RC*NAA1C = 1.67383
# Отрисовка пирамиды без невидимых граней
X1 := transpose([x_e, x_b, x_c, x_f, x_e, x_d, x_f, x_c, x_a, x_d])
Y1 := transpose([y_e, y_b, y_c, y_f, y_e, y_d, y_f, y_c, y_a, y_d])
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